Simulations: Version=160
  Simulation
    Summary SummaryFile
    Weather: FileName=NewCorrectModelWeather\-3.79--80.11-predictions_85.met
    SoilArbitrator
    Zone Field: Area=1; Slope=0; AspectAngle=0; Altitude=50
      Report: EventNames=[Wheat].Harvesting
        VariableNames:
          [Clock].Today
          [Wheat].Phenology.Zadok.Stage
          [Wheat].Phenology.CurrentStageName
          [Wheat].AboveGround.Wt
          [Wheat].AboveGround.N
          [Wheat].Grain.Total.Wt*10 as Yield
          [Wheat].Grain.Protein
          [Wheat].Grain.Size
          [Wheat].Grain.Number
          [Wheat].Grain.Total.Wt
          [Wheat].Grain.Total.N
          [Wheat].Total.Wt
      Fertiliser
      Soil SoilType =  clay loam: SoilType=SoilType =  clay loam; State=Provincia de El Oro; Country=Ecuador; ApsoilNumber=0; Latitude=-3.7957; Longitude=-80.1151
        DataSource=Original source is www.isric.org. See: https://www.isric.org/explore/soilgrids/faq-soilgrids  2023-05-23 18:45:50
        Comments=resolution = 250m - taxonomic classification name = clay loam - drainage class = NA - elevation = NA - slope = NA - geomdesc = NA
        Physical
          Thickness  ParticleSizeClay  ParticleSizeSand  ParticleSizeSilt  BD    AirDry     LL15      DUL       SAT       KS
          50         30.2              50.2              19.6              1.28  0.0909023  0.181805  0.289299  0.404913  387.822
          100        30.3              50.1              19.6              1.31  0.182199   0.182199  0.289928  0.404936  381.999
          150        34                47.1              18.9              1.32  0.203946   0.203946  0.316068  0.414269  238.558
          300        35.1              45.9              19                1.36  0.21038    0.21038   0.324153  0.417706  206.667
          400        37.5              44.2              18.3              1.36  0.2245     0.2245    0.340408  0.424756  151.671
          1000       36.4              44.3              19.3              1.37  0.218015   0.218015  0.333846  0.422244  174.785
          SoilCrop MaizeSoil
            LL=[0.181805, 0.182199, 0.203946, 0.21038, 0.2245, 0.218015]
            KL=[0.06, 0.0491238, 0.0402192, 0.0329287, 0.0269597, 0.0220728]
            XF=[1, 1, 1, 1, 1, 1]
          SoilCrop SoybeanSoil
            LL=[0.181805, 0.182199, 0.203946, 0.21038, 0.2245, 0.218015]
            KL=[0.06, 0.0491238, 0.0402192, 0.0329287, 0.0269597, 0.0220728]
            XF=[1, 1, 1, 1, 1, 1]
          SoilCrop WheatSoil
            LL=[0.181805, 0.182199, 0.203946, 0.21038, 0.2245, 0.218015]
            KL=[0.06, 0.0491238, 0.0402192, 0.0329287, 0.0269597, 0.0220728]
            XF=[1, 1, 1, 1, 1, 1]
        WaterBalance SoilWater: SummerDate=1-Nov; SummerU=5; SummerCona=5; WinterDate=1-Apr; WinterU=5; WinterCona=5; DiffusConst=40; DiffusSlope=16; Salb=0.13; CN2Bare=73; CNRed=20; CNCov=0.8; PSIDul=-100; Thickness=[50, 100, 150, 300, 400, 1000]; SWCON=[0.4, 0.4, 0.4, 0.4, 0.4, 0.4]
        Organic: FOMCNRatio=40; CarbonUnits=Total
          Thickness  Carbon  SoilCNRatio  FBiom      FInert    FOM
          50         2.76    12           0.04       0.8       150
          100        2.04    12           0.0327492  0.80804   122.81
          150        1.09    12           0.0268128  0.816161  100.548
          300        0.82    12           0.0219525  0.824364  82.3217
          400        0.71    12           0.0179732  0.832649  67.3993
          1000       0.71    12           0.0147152  0.841017  55.1819
        Chemical: Thickness=[50, 100, 150, 300, 400, 1000]; PH=[6.4, 6.4, 6.4, 6.4, 6.5, 6.5]; PHUnits=Water
        Water: Thickness=[50, 100, 150, 300, 400, 1000]; InitialPAWmm=229.293; RelativeTo=LL15; FilledFromTop=false
          InitialValues=[0.289299, 0.289928, 0.316068, 0.324153, 0.340408, 0.333846]
        CERESSoilTemperature Temperature
        Nutrient
        Solute NO3: Thickness=[50, 100, 150, 300, 400, 1000]; InitialValues=[0.5, 0.495025, 0.490099, 0.485223, 0.480395, 0.475615]; InitialValuesUnits=ppm; WaterTableConcentration=0; D0=0; DepthConstant=0; MaxDepthSoluteAccessible=0; RunoffEffectivenessAtMovingSolute=0; MaxEffectiveRunoff=0
        Solute NH4: Thickness=[50, 100, 150, 300, 400, 1000]; InitialValuesUnits=ppm; WaterTableConcentration=0; D0=0; DepthConstant=0; MaxDepthSoluteAccessible=0; RunoffEffectivenessAtMovingSolute=0; MaxEffectiveRunoff=0
          InitialValues=[0.05, 0.0495025, 0.0490099, 0.0485223, 0.0480395, 0.0475615]
        Solute Urea: Thickness=[50, 100, 150, 300, 400, 1000]; InitialValues=[0, 0, 0, 0, 0, 0]; InitialValuesUnits=kg/ha; WaterTableConcentration=0; D0=0; DepthConstant=0; MaxDepthSoluteAccessible=0; RunoffEffectivenessAtMovingSolute=0; MaxEffectiveRunoff=0
      SurfaceOrganicMatter: InitialResidueName=wheat_stubble; InitialResidueType=wheat; InitialResidueMass=500; InitialStandingFraction=0; InitialCPR=0; InitialCNR=100
      Plant Wheat
      MicroClimate: a_interception=0; b_interception=1; c_interception=0; d_interception=0; SoilHeatFluxFraction=0.4; MinimumHeightDiffForNewLayer=0; NightInterceptionFraction=0.5; ReferenceHeight=2
      Manager SowingFertiliser
        Amount = 160
        CropName = wheat
```csharp
using Models.Soils;
using System.Linq;
using System;
using Models.Core;
using Models.PMF;
namespace Models
{
    [Serializable]
    public class Script : Model
    {
        [Link] Clock Clock;
        [Link] Fertiliser Fertiliser;
        [Link] Summary Summary;
        
        
        [Description("Amount of fertiliser to be applied (kg/ha)")]
        public double Amount { get; set;}
        
        [Description("Crop to be fertilised")]
        public string CropName { get; set;}
        
        
        

        [EventSubscribe("Sowing")]
        private void OnSowing(object sender, EventArgs e)
        {
            Model crop = sender as Model;
            if (crop.Name.ToLower()==CropName.ToLower())
                Fertiliser.Apply(Amount: Amount, Type: Fertiliser.Types.NO3N);
        }
        
    }
}
```
      Manager Harvest
```csharp
using Models.Soils.Nutrients;
using System.Linq;
using System;
using Models.Core;
using Models.PMF;
using Models.Soils;
using Models.Soils.Nutrients;
using Models.Utilities;
using APSIM.Shared.Utilities;

namespace Models
{
    [Serializable]
    public class Script : Model
    {
        [Link] Plant Wheat;

        [EventSubscribe("DoManagement")]
        private void OnDoManagement(object sender, EventArgs e)
        {
            if (Wheat.IsReadyForHarvesting)
            {
               Wheat.Harvest();
               Wheat.EndCrop();    
            }
        
        }
        
    }
}
```
      Manager SowingRule1
        StartDate = 1-may
        EndDate = 10-jul
        MinESW = 100
        MinRain = 25
        RainDays = 7
        CultivarName = Hartog
        SowingDepth = 30
        RowSpacing = 250
        Population = 120
```csharp
using Models.Interfaces;
using System.Linq;
using System;
using Models.Core;
using Models.PMF;
using Models.Soils;
using Models.Soils.Nutrients;
using Models.Utilities;
using APSIM.Shared.Utilities;
using Models.Climate;

namespace Models
{
    [Serializable]
    public class Script : Model
    {
        [Link] private Clock Clock;
        [Link] private Fertiliser Fertiliser;
        [Link] private Summary Summary;
        [Link(ByName = true)] private Plant Wheat;
        [Link] private Soil Soil;
        private Accumulator accumulatedRain;
        [Link]
        private ISoilWater waterBalance;
        
        [Description("Start of sowing window (d-mmm)")]
        public string StartDate { get; set;}
        [Description("End of sowing window (d-mmm)")]
        public string EndDate { get; set;}
        [Description("Minimum extractable soil water for sowing (mm)")]
        public double MinESW { get; set;}
        [Description("Accumulated rainfall required for sowing (mm)")]
        public double MinRain { get; set;}
        [Description("Duration of rainfall accumulation (d)")]
        public int RainDays { get; set;}
        [Description("Cultivar to be sown")]
        [Display(Type=DisplayType.CultivarName, PlantName = "Wheat")]
        public string CultivarName { get; set;}
        [Description("Sowing depth (mm)")]
        public double SowingDepth { get; set;}        
        [Description("Row spacing (mm)")]
        public double RowSpacing { get; set;}    
        [Description("Plant population (/m2)")]
        public double Population { get; set;}    
        
        
        [EventSubscribe("StartOfSimulation")]
        private void OnSimulationCommencing(object sender, EventArgs e)
        {
            accumulatedRain = new Accumulator(this, "[Weather].Rain", RainDays);
        }
        

        [EventSubscribe("DoManagement")]
        private void OnDoManagement(object sender, EventArgs e)
        {
            accumulatedRain.Update();
            
            if (DateUtilities.WithinDates(StartDate,Clock.Today,EndDate) &&
                !Wheat.IsAlive &&
                MathUtilities.Sum(waterBalance.ESW) > MinESW &&
                accumulatedRain.Sum > MinRain)
            {
               Wheat.Sow(population:Population, cultivar:CultivarName, depth:SowingDepth, rowSpacing:RowSpacing);    
            }
        
        }
        
    }
}
```
    Clock: Start=2011-01-01; End=2099-12-31
  DataStore
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