Simulations: Version=160
  DataStore
  Simulation
    Weather: FileName=NewModelsWeather\-3.05--79.81_hist.met
    Summary summaryfile
    MicroClimate: a_interception=0; b_interception=1; c_interception=0; d_interception=0; SoilHeatFluxFraction=0.4; MinimumHeightDiffForNewLayer=0; NightInterceptionFraction=0.5; ReferenceHeight=2
    Zone Field: Area=1; Slope=0; AspectAngle=0; Altitude=50
      Fertiliser
      Sugarcane: maxt_lb=0
      Folder Manager folder
        Manager SUGAR management
          planting_day = 1-apr
          plantlen = 450
          plant_stalks = 10
          variety = q117
          sowing_depth = 150
          NoRatoons = 4
          ratoonlen = 390
          ratoon_stalks = 10
```csharp
using Models.Soils;
using System.Linq;
using System;
using Models.Core;
using Models.PMF;
using APSIM.Shared.Utilities;

namespace Models
{
    [Serializable]
    [System.Xml.Serialization.XmlInclude(typeof(Model))]
    public class Script : Model
    {
        [Link] Clock Clock;
        [Link] Sugarcane Sugarcane;
        
        [Description("Enter planting date (dd-mmm)")]
        public string planting_day { get; set; }
        [Description("Duration of a plant crop (days) (30days/mth x 15mths)")]
        public int    plantlen { get; set; }
        [Description("Stalk density of plant crop (/m2)")]
        public double plant_stalks { get; set; }
        [Description("Planting variety")]
        [Display(Type=DisplayType.CultivarName, PlantName = "Sugarcane")]
        public string variety { get; set; }
        [Description("Planting depth (mm)")]
        public double sowing_depth { get; set; }
        [Description("Number of ratoons before EndCrop")]  
        public int    NoRatoons { get; set; }
        [Description("Duration of a ratoon crop (days) (30days/mth x 13mths)")]
        public int    ratoonlen { get; set; }
        [Description("Stalk density of ratoon crop (/m2)")]
        public double ratoon_stalks { get; set; }
        

        private int dah;
        //Remove this later, I don't think they use it. Days After Harvest.
        
        //two below are used for rotations. Remove this. I don't think ApsimX does rotations like this.
        private int nextcrop;
        private int fallowin;

        
        [EventSubscribe("StartOfSimulation")]
        private void OnStartOfSimulation(object sender, EventArgs e)
        {
            //Rotation variables. Not sure if these are still needed in ApsimX rotations
            nextcrop = 0;
            fallowin = 0;
        }


        [EventSubscribe("StartOfDay")]
        private void OnStartOfDay(object sender, EventArgs e)
        {

            //! Initialise and set a time counter for entire run
            dah = 0;


            if (Sugarcane.crop_status == "alive")
            {
                dah = 0;

                //! Set harvest dates for each crop phase
                if (((Sugarcane.DaysAfterSowing == plantlen) && (Sugarcane.ratoon_no == 0))
                    || ((Sugarcane.DaysAfterSowing == ratoonlen) && (Sugarcane.ratoon_no > 0)))
                {
                    
                    Sugarcane.HarvestCrop();
                    if (Sugarcane.ratoon_no == NoRatoons + 1)
                    {
                        //! plough the crop out
                        Sugarcane.KillCrop();
                        Sugarcane.EndCrop();
                    }
                    else
                    {
                        //! Set stalk density
                        Sugarcane.plants = ratoon_stalks;
                    }
                }
                else
                {
                    //! We have not reached the harvest date for this ratoon.
                }
            }
            else if (Sugarcane.crop_status == "dead")
            {
                Sugarcane.HarvestCrop();
                Sugarcane.EndCrop();
            }
            else if ((Sugarcane.crop_status == "out") && (DateUtilities.DatesEqual(planting_day, Clock.Today)))
            {
                Sugarcane.SowNewPlant(PlantingDensity: 10, Depth: sowing_depth, CultivarName: variety);
                Sugarcane.plants = plant_stalks;
                dah = 0;
            }
            else
            {
                dah = dah + 1;
            }
     
        }
    }
}
```
        Manager Fertilise on fixed date
          fert_date = 1-Sep
          fert_criteria = 1000
          fert_amount = 200
          fert_type = hard coded
```csharp
using Models.Soils.Nutrients;
using Models.Interfaces;
using APSIM.Shared.Utilities;
using Models.Soils;
using Models.Soils.Nutrients;
using Models.PMF;
using Models.Core;
using System;
using System.Linq;

namespace Models
{
    [Serializable]
    [System.Xml.Serialization.XmlInclude(typeof(Model))]
    public class Script : Model
    {
        [Link] private Clock Clock;
        [Link] private Soil Soil;
        [Link] private Fertiliser Fertiliser;
        [Link] private Summary Summary;
        private double N_topsoil;
        [Link(ByName = true)]
        private ISolute NO3;
        [Link(ByName = true)]
        private ISolute NH4;

        
        [Description("Fertilise on this date (dd-mmm)")]
        public string fert_date { get; set; }
        
        [Description("Don't add fertiliser if N in top 2 layers exceeds (kg/ha)")]
        public double fert_criteria { get; set; }
        
        [Description("Amount to apply (kg/ha)")]
        public double fert_amount { get; set; }
        
        [Description("Type of fertilser to apply")]
        public string fert_type { get; set; }
    


        /*
         if (today = date('[fert_date]') then
            N_topsoil = no3(1) + nh4(1) + no3(2) + nh4(2)
            if (N_topsoil < [fert_criteria]) then
               [fertmodule] apply amount = [fert_amount] (kg/ha), depth = 50 (mm), type = [fert_type] ()
            endif
         endif 
        */
        
        
        [EventSubscribe("StartOfDay")]
        private void OnStartOfDay(object sender, EventArgs e)
        {

            if (DateUtilities.DatesEqual(fert_date, Clock.Today))
            {
                N_topsoil = NO3.kgha[1] + NH4.kgha[1] + NO3.kgha[2] + NH4.kgha[2];                    
                if (N_topsoil < fert_criteria)
                {
                    Fertiliser.Apply(Amount: fert_amount, Depth: 50, Type: Fertiliser.Types.UreaN);
                }
            }

        }
      
    }
}
```
      Report: EventNames=[Clock].DoReport
        VariableNames:
          [Clock].Today
          [Sugarcane].crop_status
          [Sugarcane].biomass
          [Sugarcane].cane_wt
          [Sugarcane].sucrose_wt
          [Sugarcane].height
          [Sugarcane].root_depth
          [Sugarcane].node_no_detached
          [Sugarcane].leaves
          [Sugarcane].green_leaves
          [Sugarcane].dead_leaves
          [Sugarcane].lai
          [Sugarcane].tla
          [Sugarcane].plant_n_tot
          [Sugarcane].swdef_photo
          [Sugarcane].swdef_pheno
          [Sugarcane].swdef_expan
          [Sugarcane].swdef_stalk
          [Sugarcane].nfact_photo
          [Sugarcane].nfact_expan
          [Sugarcane].oxdef_photo
          [Sugarcane].ep
      SurfaceOrganicMatter Surface Organic Matter: InitialResidueName=sugar_trash; InitialResidueType=Sugarcane; InitialResidueMass=1000; InitialStandingFraction=1; InitialCPR=0; InitialCNR=80
      Soil SoilType =  clay loam: SoilType=SoilType =  clay loam; Country=Ecuador; ApsoilNumber=0; Latitude=-3.05; Longitude=-79.81
        DataSource=Original source is www.isric.org. See: https://www.isric.org/explore/soilgrids/faq-soilgrids  2023-05-22 21:11:58
        Comments=resolution = 250m - taxonomic classification name = clay loam - drainage class = NA - elevation = NA - slope = NA - geomdesc = NA
        Water: Thickness=[50, 100, 150, 300, 400, 1000]; InitialPAWmm=252.88; RelativeTo=LL15; FilledFromTop=true
          InitialValues=[0.321233, 0.325515, 0.335828, 0.326418, 0.329245, 0.328288]
        Physical
          Thickness  ParticleSizeClay  ParticleSizeSand  ParticleSizeSilt  BD    AirDry     LL15      DUL       SAT       KS
          50         32.4              37.8              29.8              0.99  0.0978943  0.195789  0.321233  0.422186  267.369
          100        33.1              37.3              29.6              1.03  0.199541   0.199541  0.325515  0.423839  247.004
          150        34.7              36                29.3              1.07  0.208925   0.208925  0.335828  0.428987  209.616
          300        33.1              36.6              30.3              1.14  0.199259   0.199259  0.326418  0.424245  244.052
          400        33.7              36.8              29.5              1.15  0.202664   0.202664  0.329245  0.425287  230.308
          1000       33.6              37.1              29.3              1.17  0.202093   0.202093  0.328288  0.424746  233.176
          SoilCrop MaizeSoil
            LL=[0.195789, 0.199541, 0.208925, 0.199259, 0.202664, 0.202093]
            KL=[0.06, 0.0491238, 0.0402192, 0.0329287, 0.0269597, 0.0220728]
            XF=[1, 1, 1, 1, 1, 1]
          SoilCrop SugarcaneSoil: LL=[0.196, 0.2, 0.209, 0.199, 0.203, 0.202]; KL=[0.06, 0.049, 0.04, 0.033, 0.027, 0.022]; XF=[1, 1, 1, 1, 1, 1]
          SoilCrop WheatSoil
            LL=[0.195789, 0.199541, 0.208925, 0.199259, 0.202664, 0.202093]
            KL=[0.06, 0.0491238, 0.0402192, 0.0329287, 0.0269597, 0.0220728]
            XF=[1, 1, 1, 1, 1, 1]
        WaterBalance SoilWater: SummerDate=1-Nov; SummerU=4; SummerCona=3; WinterDate=1-Apr; WinterU=4; WinterCona=3; DiffusConst=40; DiffusSlope=16; Salb=0.13; CN2Bare=73; CNRed=20; CNCov=0.8; PSIDul=-100; Thickness=[50, 100, 150, 300, 400, 1000]; SWCON=[0.4, 0.4, 0.4, 0.4, 0.4, 0.4]
        Organic: FOMCNRatio=70; CarbonUnits=Total
          Thickness  Carbon  SoilCNRatio  FBiom      FInert    FOM
          50         5.14    12           0.04       0.8       150
          100        3.86    12           0.0327492  0.80804   122.81
          150        3.93    12           0.0268128  0.816161  100.548
          300        2.81    12           0.0219525  0.824364  82.3217
          400        2.45    12           0.0179732  0.832649  67.3993
          1000       2.51    12           0.0147152  0.841017  55.1819
        Chemical: Thickness=[50, 100, 150, 300, 400, 1000]; PH=[6.8, 6.8, 6.9, 6.9, 7, 7.1]; PHUnits=Water
        CERESSoilTemperature Temperature
        Nutrient
        Solute NO3: Thickness=[50, 100, 150, 300, 400, 1000]; InitialValues=[0.5, 0.495025, 0.490099, 0.485223, 0.480395, 0.475615]; InitialValuesUnits=ppm; WaterTableConcentration=0; D0=0; DepthConstant=0; MaxDepthSoluteAccessible=0; RunoffEffectivenessAtMovingSolute=0; MaxEffectiveRunoff=0
        Solute NH4: Thickness=[50, 100, 150, 300, 400, 1000]; InitialValuesUnits=ppm; WaterTableConcentration=0; D0=0; DepthConstant=0; MaxDepthSoluteAccessible=0; RunoffEffectivenessAtMovingSolute=0; MaxEffectiveRunoff=0
          InitialValues=[0.05, 0.0495025, 0.0490099, 0.0485223, 0.0480395, 0.0475615]
        Solute Urea: Thickness=[50, 100, 150, 300, 400, 1000]; InitialValues=[0, 0, 0, 0, 0, 0]; InitialValuesUnits=kg/ha; WaterTableConcentration=0; D0=0; DepthConstant=0; MaxDepthSoluteAccessible=0; RunoffEffectivenessAtMovingSolute=0; MaxEffectiveRunoff=0
    Clock: Start=1981-01-01; End=2020-12-31
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